<Lems>

<!-- Example with instances of cells in populations having different parameters... -->

<!-- Specify which component to run -->
    <Target component="sim1"/>

<!-- Include core NeuroML2 ComponentType definitions -->
    <Include file="Cells.xml"/>
    <Include file="Networks.xml"/>
    <Include file="Simulation.xml"/>

    <!-- Main NeuroML2 content. -->

    <!-- Including file with a <neuroml> root, a "real" NeuroML 2 file -->
    <Include file="../examples/NML2_InstanceBasedNetwork.nml"/>

    <!-- End of NeuroML2 content -->

    <Simulation id="sim1" length="300ms" step="0.05ms" target="InstanceBasedNetwork">

        <Display id="d1" title="Ex13: Instance Based Network in LEMS" timeScale="1ms" xmin="0" xmax="300" ymin="-65" ymax="-52">
            <Line id ="iaf0" quantity="iafCells/0/iaf/v" scale="1mV"  color="#ee0555" timeScale="1ms"/>
            <Line id ="iaf1" quantity="iafCells/1/iaf/v" scale="1mV"  color="#999255" timeScale="1ms"/>
            <Line id ="iaf2" quantity="iafCells/2/iaf/v" scale="1mV"  color="#911155" timeScale="1ms"/>
        </Display>

    </Simulation>

</Lems>
