<?xml version="1.0" encoding="UTF-8"?>

<neuroml xmlns="http://www.neuroml.org/schema/neuroml2"
    xmlns:xsi="http://www.w3.org/2001/XMLSchema-instance"
    xsi:schemaLocation="http://www.neuroml.org/schema/neuroml2  ../Schemas/NeuroML2/NeuroML_v2beta.xsd"
    id="NML2_SynapseTypes">

    <!-- Some examples of the currently supported synapse types -->

    <expOneSynapse id="sy1" gbase="0.5nS" erev="0mV" tauDecay="3ms" >
      <notes>A simple monoexponential synapse.</notes>
    </expOneSynapse>

    <expTwoSynapse id="SimpleSynapse" gbase="0.5nS" erev="0mV"
		   tauRise="1ms" tauDecay="2ms" >
      <notes>A biexponential synapse.</notes>
    </expTwoSynapse>

    <nmdaSynapse id="nmdaSyn" gbase="0.5nS" erev="0mV" tauRise="2ms"
		 tauDecay="8ms">
      <notes>A blocking synapse.</notes>
      <voltageConcDepBlock species="mg" blockConcentration="1.2 mM"
			   scalingConc="1.920544 mM"
			   scalingVolt="16.129 mV"/>
    </nmdaSynapse>

    <stpSynapse id="stpSynDep" gbase="1nS" erev="0mV" tauRise="0.1ms" tauDecay="2ms">
      <notes>A biexponential synapse exhibiting STD.</notes>
      <stpMechanism type="tsodyksMarkramDepMechanism"
		 initReleaseProb="0.5" tauRec="120 ms" />
    </stpSynapse>

    <stpSynapse id="stpSynDepFac" gbase="1nS" erev="0mV"
		tauRise="0.1ms" tauDecay="2ms">
      <notes>A biexponential synapse with short term depression
      and facilitation.</notes>
      <stpMechanism type="tsodyksMarkramDepFacMechanism"
		    initReleaseProb="0.5" tauRec="120 ms" tauFac="10
								  ms"/>
    </stpSynapse>

    <blockStpSynapse id="blockStpSynDep" gbase="1nS" erev="0mV"
		     tauRise="0.1ms" tauDecay="2ms">
      <notes>A biexponential blocking synapse, with STD.</notes>
      <stpMechanism type="tsodyksMarkramDepFacMechanism"
		    initReleaseProb="0.5" tauRec="120 ms"/>
      <blockMechanism type="voltageConcDepBlock" species="mg"
		      blockConcentration="1.2 mM"
		      scalingConc="1.920544 mM" scalingVolt="16.129
							     mV"/>
    </blockStpSynapse>

    <blockStpSynapse id="blockStpSynDepFac" gbase="1nS" erev="0mV"
		     tauRise="0.1ms" tauDecay="2ms">
      <notes>A biexponential blocking synapse with short term
      depression and facilitation.</notes>
      <stpMechanism type="tsodyksMarkramDepFacMechanism"
		    initReleaseProb="0.5" tauRec="120 ms" tauFac="10
								  ms"/>
      <blockMechanism type="voltageConcDepBlock" species="mg"
		      blockConcentration="1.2 mM"
		      scalingConc="1.920544 mM" scalingVolt="16.129
							     mV"/>
    </blockStpSynapse
>

</neuroml>
